// SBML level 3 version 2

model model()
  // The model of CD95 and NF-kB signaling
  // biomodels.db:BIOMD0000000243 biomodels.db:MODEL1003100001
  // occursIn taxonomy:9606
  // isPartOf reactome:REACT_21281 reactome:REACT_1619 GO:0008624 GO:0051092
  // isDescribedBy pubmed:20212524

  // Compartments:
  compartment cell = 1 litre; cell is "Cell";  // GO:0005623

  // Species:
  substanceOnly species pro8 in cell = 64.47652*cell;  // substance in nM; isVersionOf uniprot:Q14790
  substanceOnly species C8star in cell = 0; C8star is "casp8";  // substance in nM; isVersionOf uniprot:Q14790
  substanceOnly species DISC in cell = 0;  // substance in nM; isPartOf uniprot:Q13158 uniprot:P25445 uniprot:Q0VHD7
  substanceOnly species DISCC8 in cell = 0; DISCC8 is "DISC:pro8";  // substance in nM; hasPart uniprot:Q0VHD7 uniprot:Q14790 uniprot:P25445 uniprot:Q13158
  substanceOnly species L in cell = 113.22*cell; L is "CD95L";  // substance in nM; isVersionOf uniprot:Q0VHD7
  substanceOnly species RF in cell = 91.26592*cell; RF is "CD95R:FADD";  // substance in nM; hasPart uniprot:Q13158 uniprot:P25445
  substanceOnly species p43p41 in cell = 0; p43p41 is "p43/p41";  // substance in nM; hasPart uniprot:Q14790

  // Parameters:
  _CONFLICTS_WITH_TIME_ = 0;
  // 1-10
  k1 = 5 per_nM_per_min;
  // 0.001-1
  k11 = 0.1 per_min;
  // 1.0E-5 - 1.0E-3
  k2 = 1e-5 per_nM_per_min;
  // 5.0E-5- 5.0E-3
  k5 = 5e-5 per_nM_per_min;
  // 8.0E-5 - 8.0E-3
  k8 = 8e-5 per_nM_per_min;

  // Assignment rules:
  pro8_total := pro8 + DISCC8;

  // Reactions:
  r1: L + RF => DISC; k1*L*RF;
  r14: 2 p43p41 => C8star; k8*p43p41*p43p41;
  r17: C8star => ; k11*C8star;  // isVersionOf GO:0030163
  r2: pro8 + DISC => DISCC8; k2*DISC*pro8;  // isVersionOf GO:0006461
  r5: pro8 + DISCC8 => 2 p43p41; k5*DISCC8*pro8;

  // Unit definitions:
  unit min = 60 second;
  unit per_min = 1 / (60 second);
  unit per_nM_per_min = litre / (1e-9 mole * 60 second);
  unit nM = 1e-9 mole / litre;
end
